// SBML level 3 version 2
// Created with PySCeS (1.1.0) on Sun, 25 Jun 2023 12:40:11 by jr

model ITC_Prx_dim_dec()

  // Compartments:
  compartment cell_volume = 1400;

  // Species:
  species dimers in cell_volume = 0;
  species decamers in cell_volume = 0;

  // Parameters:
  koff = 1;
  kon = 1;
  exponent = 130;
  Kd_app = 1;
  injection_volume = 1.6;
  injection_dimer = 0.8;
  injection_decamer = 6.84;
  injection_interval = 180;
  first_inject_ratio = 1;

  // Reactions:
  Disassociation: decamers -> 5 dimers; koff*decamers - kon*dimers^exponent;

  // Events:
  first_injection_prot: at (time > 0): dimers = (dimers*cell_volume + first_inject_ratio*injection_dimer*injection_volume + first_inject_ratio*injection_decamer*injection_volume*5)/(cell_volume + injection_volume);
  first_injection_vol: at (time > 0): cell_volume = cell_volume + injection_volume;
  injection_prot: at (cos((time - 1)*2*pi/injection_interval) > 1): decamers = (decamers*cell_volume + injection_decamer*injection_volume)/(cell_volume + injection_volume), dimers = (dimers*cell_volume + injection_dimer*injection_volume)/(cell_volume + injection_volume);
  injection_vol: at (cos((time - 1)*2*pi/injection_interval) > 1): cell_volume = cell_volume + injection_volume;

  // Unit definitions:
  unit substance = 1e-6 mole;
  unit volume = 1e-6 litre;
  unit time = second;
  unit length = metre;
  unit area = metre^2;
end
