// SBML level 3 version 2
// Created with PySCeS (1.1.1) on Fri, 28 Jul 2023 17:00:33 by jr

model PRDX2_sys()

  // Compartments:
  compartment Cell = 1;

  // Species:
  species H2O2 in Cell = 4;
  species SH_SH in Cell = 10;
  species SH_SOH in Cell = 0;
  species SH_SS in Cell = 0;
  species SH_SO2H in Cell = 0;
  species SOH_SOH in Cell = 0;
  species SOH_SS in Cell = 0;
  species SOH_SO2H in Cell = 0;
  species SS_SS in Cell = 0;
  species SS_SO2H in Cell = 0;
  species SO2H_SO2H in Cell = 0;
  species TrxSH in Cell = 5;
  species TrxSOH in Cell = 0;
  species NADPH in Cell = 5;
  species NADP in Cell = 0;

  // Parameters:
  kprx = 100;
  ksulf = 0.012;
  kcond = 1.7;
  kred = 0.21;
  TRR = 0.14;
  kcat_TRR = 73;
  KM_TrxSOH_TRR = 1.83;
  KM_NADPH_TRR = 6;

  // Reactions:
  Prx_R_R_ox: SH_SH + H2O2 => SH_SOH; 2*kprx*SH_SH*H2O2;
  Prx_R_S_ox: SH_SS + H2O2 => SOH_SS; kprx*SH_SS*H2O2;
  Prx_R_O_ox: SH_SOH + H2O2 => SOH_SOH; kprx*SH_SOH*H2O2;
  Prx_R_O2_ox: SH_SO2H + H2O2 => SOH_SO2H; kprx*SH_SO2H*H2O2;
  Prx_O_O_oox: SOH_SOH + H2O2 => SOH_SO2H; 2*ksulf*SOH_SOH*H2O2;
  Prx_O_S_oox: SOH_SS + H2O2 => SS_SO2H; ksulf*SOH_SS*H2O2;
  Prx_R_O_oox: SH_SOH + H2O2 => SH_SO2H; ksulf*SH_SOH*H2O2;
  Prx_O_O2_oox: SOH_SO2H + H2O2 => SO2H_SO2H; ksulf*SOH_SO2H*H2O2;
  Prx_R_O_disulf_form: SH_SOH => SH_SS; kcond*SH_SOH;
  Prx_O_O_disulf_form: SOH_SOH => SOH_SS; 2*kcond*SOH_SOH;
  Prx_O_S_disulf_form: SOH_SS => SS_SS; kcond*SOH_SS;
  Prx_O_O2_disulf_form: SOH_SO2H => SS_SO2H; kcond*SOH_SO2H;
  Prx_R_S_red_TrxSH: SH_SS + TrxSH => SH_SH + TrxSOH; kred*SH_SS*TrxSH;
  Prx_O_S_red_TrxSH: SOH_SS + TrxSH => SH_SOH + TrxSOH; kred*SOH_SS*TrxSH;
  Prx_S_S_red_TrxSH: SS_SS + TrxSH => SH_SS + TrxSOH; 2*kred*SS_SS*TrxSH;
  Prx_S_O2_red_TrxSH: SS_SO2H + TrxSH => SH_SO2H + TrxSOH; kred*SS_SO2H*TrxSH;
  Trx_red1: TrxSOH + NADPH => NADP + TrxSH; MM_irr_2S(TRR, kcat_TRR, TrxSOH, KM_TrxSOH_TRR, NADPH, KM_NADPH_TRR);
  H2O2_production: => H2O2; 0;

  // Unit definitions:
  unit substance = mole;
  unit volume = litre;
  unit time = second;
  unit length = metre;
  unit area = metre^2;
end
