// SBML level 3 version 2
// Created with PySCeS (1.1.1) on Fri, 28 Jul 2023 17:00:34 by jr

model Prx_dim_dec_dil()

  // Compartments:
  compartment Cell = 1;

  // Species:
  species SH_SH__SH_SH__SH_SH__SH_SH__SH_SH in Cell = 0;
  species SH_SH in Cell = 0;

  // Parameters:
  k_Prx_dec_disasso = 0;
  k_Prx_asso = 0;
  exponent = 5;
  dilution_factor = 1;

  // Reactions:
  Decamer_disassociation: SH_SH__SH_SH__SH_SH__SH_SH__SH_SH -> 5 SH_SH; k_Prx_dec_disasso*SH_SH__SH_SH__SH_SH__SH_SH__SH_SH - k_Prx_asso*SH_SH^exponent;

  // Unit definitions:
  unit substance = 1e-6 mole;
  unit volume = 1e-6 litre;
  unit time = second;
  unit length = metre;
  unit area = metre^2;
end
