// SBML level 3 version 2
// Created with PySCeS (1.1.0) on Sun, 25 Jun 2023 12:40:11 by jr

model RBC_PRDX2_modelB()

  // Compartments:
  compartment Erythrocyte = 1;
  compartment Plasma = 1.701534;

  // Species:
  species Cpd2 in Erythrocyte = 0;
  species GSH in Erythrocyte = 3200;
  species NADPfree in Erythrocyte = 0.1;
  species H2O2 in Erythrocyte = 0;
  species Cpd1 in Erythrocyte = 0;
  species Ferri in Erythrocyte = 24.4;
  species GSSG in Erythrocyte = 0;
  species NADPHfree in Erythrocyte = 2.615094;
  species SH_SH in Erythrocyte = 0;
  species SH_SOH in Erythrocyte = 0;
  species SO2H_SO2H in Erythrocyte = 0;
  species SS_SO2H in Erythrocyte = 0;
  species iSH_SS in Erythrocyte = 0;
  species iSH_SOH in Erythrocyte = 0;
  species iSH_SO2H in Erythrocyte = 0;
  species iSH_SH in Erythrocyte = 0;
  species iSH_iSH in Erythrocyte = 285;
  species NADPHbound in Erythrocyte = 25.10491;
  species SOH_SOH in Erythrocyte = 0;
  species SOH_SS in Erythrocyte = 0;
  species SOH_SO2H in Erythrocyte = 0;
  species SS_SS in Erythrocyte = 0;
  species SH_SS in Erythrocyte = 0;
  species SH_SO2H in Erythrocyte = 0;
  species Trx1SH_Trx2SOH in Erythrocyte = 0;
  species Trx1SH_Trx2SH in Erythrocyte = 0.56;
  species Trx1SOH_Trx2SOH in Erythrocyte = 0;
  species Trx1SOH_Trx2SH in Erythrocyte = 0;
  species NADPbound in Erythrocyte = 0.18;
  species eH2O2 in Plasma = 0;

  // Parameters:
  kprx = 100;
  ksulf = 0.012;
  kcond = 1.7;
  kred = 0.21;
  ksrx = 0.0001;
  kPrx2Activ = 10000000;
  VMaxTrxR = 10;
  KMNADPHTrxR = 6;
  KMTrx1SOH_Trx2SH = 1.83;
  ktrx = 0.21;
  Cat_1_k1 = 6;
  Cat_2_k1 = 18;
  Cat_3_k1 = 0.011;
  Cat_4_k1 = 73900;
  GPx1_f1 = 0.0399;
  GPx1_f2 = 9.72;
  GSR_KMGSSG = 65;
  GSR_KMNADPH = 8.5;
  GSR_VMax = 49;
  NADP_reduction_Km = 0.45;
  NADP_reduction_V = 2.4;
  k__sequest = 10000000;
  H2O2_production_v = 0.0895;
  H2O2_perm = 10.9;
  fix_eH2O2 = 0;
  unfix_eH2O2 = 1;
  exH2O2_pulse_length = 0;
  exH2O2_pulse_conc = 0;
  do_exH2O2_pulse = 0;
  init_for_kprx = 100;
  init_for_kcond = 1.7;
  init_for_ksulf = 0.012;
  init_for_kPrx2Activ = 10000000;
  init_for_KPrx2 = 166.9;
  KNADPHsequest = 9.6;
  KNADPsequest = 1.8;
  Compartment_1 = 7.17e-14;
  E_NADPH = -0.3636586;
  NADPtot = 28;
  Trxtot = 0.56;
  Prx2tot = 285;
  GStot = 3200;
  Cattot = 24.4;
  init_for_KTrx1 = 50;
  init_for_ksrx = 0.0001;
  init_for_kred = 0.21;
  E0_Trx = -0.23;
  E0_GSH = -0.24;
  KTrx1 = 50;
  init_for_ktrx = 0.21;
  E0_NADPH = -0.32;
  KPrx2 = 166.9;
  init_for_KNADPsequest = 1.8;
  init_for_k__sequest = 10000000;
  init_for_KNADPHsequest = 9.6;
  init_for_two_times_ktrx = 0.42;
  r_NADPH_free = 26.15094;

  // Assignment rules:
  two_times_kprx := 2*init_for_kprx;
  two_times_ksulf := 2*init_for_ksulf;
  two_times_kcond := 2*init_for_kcond;
  two_times_kred := 2*init_for_kred;
  two_times_ksrx := 2*init_for_ksrx;
  kPrx2Inactiv := init_for_kPrx2Activ*init_for_KPrx2;
  KMTrx1SOH_Trx2SOH := 1000*KMTrx1SOH_Trx2SH;
  ktrx_div_Ktrx1 := init_for_ktrx/init_for_KTrx1;
  two_times_ktrx := 2*init_for_ktrx;
  two_times_ktrx_div_Ktrx1 := init_for_two_times_ktrx/init_for_KTrx1;
  k_NADPHsequest := init_for_k__sequest*init_for_KNADPHsequest;
  k_NADPsequest := init_for_k__sequest*init_for_KNADPsequest;
  extH2O2 := eH2O2*unfix_eH2O2 + exH2O2_pulse_conc*fix_eH2O2;
  v_GPx1 := GPx1/Erythrocyte;
  f_PSO2H := t_PSO2H/(2*t_dimers);
  v_H2O2_prod := H2O2_production/Erythrocyte;
  v_H2O2_consumption := v_Cat + v_GPx1 + v_Prx2;
  v_Cat := (Cat_1 + Cat_2)/Erythrocyte;
  f_NADPH := NADPHfree/(NADPfree + NADPHfree);
  v_Prx2 := (Prx_R_R_ox + Prx_O_S_oox + Prx_R_O2_ox + Prx_O_O2_oox + iPrx_R_R_ox + Prx_R_O_ox + Prx_R_O_oox + iPrx_R_O_oox + Prx_R_S_ox + Prx_O_O_oox)/Erythrocyte;
  f_PSS := t_PSS/(2*t_dimers);
  f_1SS := t_1SS/t_dimers;
  t_dimers := SH_SH + SH_SO2H + SO2H_SO2H + SOH_SO2H + SS_SO2H + SH_SOH + SOH_SOH + SH_SS + SOH_SS + SS_SS + iSH_SH + iSH_SO2H + iSH_SOH + iSH_SS + iSH_iSH;
  t_1SS := SH_SS + SOH_SS + SS_SO2H + iSH_SS;
  t_2SS := SS_SS;
  f_PSOH := t_PSOH/(2*t_dimers);
  t_PSO2H := 2*SO2H_SO2H + SH_SO2H + SOH_SO2H + SS_SO2H + iSH_SO2H;
  f_PSH := t_PSH/(2*t_dimers);
  f_TrxOO := Trx1SOH_Trx2SOH/t_Trx;
  f_TrxOR := Trx1SOH_Trx2SH/t_Trx;
  v_NADPH := (Trx_red1 + Trx_red2)/Erythrocyte;
  f_TrxR_star := f_TrxRR + f_TrxRO;
  t_Trx := Trx1SH_Trx2SH + Trx1SH_Trx2SOH + Trx1SOH_Trx2SH + Trx1SOH_Trx2SOH;
  f_2SS := t_2SS/t_dimers;
  f_TrxRO := Trx1SH_Trx2SOH/t_Trx;
  f_TrxRR := Trx1SH_Trx2SH/t_Trx;
  fv_Cat := v_Cat/v_H2O2_consumption;
  f_NADPH_TrxR := Trx_red1/(Trx_red1 + GSR);
  NADPH_div_H2O2 := NADP_reduction/(Cat_1 + Cat_2 + GPx1 + Prx_R_R_ox + Prx_R_O_ox + Prx_R_O_oox + Prx_R_S_ox + Prx_O_O_oox + Prx_O_S_oox + Prx_R_O2_ox + Prx_O_O2_oox + iPrx_R_R_ox + iPrx_R_O_oox);
  r_NADPH_all := (NADPHfree + NADPHbound)/(NADPfree + NADPbound);
  f_GSH := GSH/(2*GSSG + GSH);
  f_Prx2_Inhib := (2*iSH_iSH + iSH_SH + iSH_SO2H + iSH_SOH + iSH_SS)/t_PSH;
  t_PSS := 2*SS_SS + SH_SS + SOH_SS + SS_SO2H + iSH_SS;
  vPrx2_div_vCat := v_Prx2/v_Cat;
  fv_Prx2 := v_Prx2/v_H2O2_consumption;
  t_PSH := 2*SH_SH + 2*iSH_SH + SH_SO2H + iSH_SO2H + SH_SOH + iSH_SOH + SH_SS + iSH_SS + 2*iSH_iSH;
  t_PSOH := 2*SOH_SOH + SH_SOH + SOH_SO2H + SOH_SS + iSH_SOH;

  // Reactions:
  Prx_R_R_ox: SH_SH + H2O2 => SH_SOH; Erythrocyte*two_times_kprx*SH_SH*H2O2;
  Prx_R_S_ox: SH_SS + H2O2 => SOH_SS; Erythrocyte*kprx*SH_SS*H2O2;
  Prx_R_O_ox: SH_SOH + H2O2 => SOH_SOH; Erythrocyte*kprx*SH_SOH*H2O2;
  Prx_R_O2_ox: H2O2 + SH_SO2H => SOH_SO2H; Erythrocyte*kprx*SH_SO2H*H2O2;
  iPrx_R_R_ox: H2O2 + iSH_SH => iSH_SOH; Erythrocyte*kprx*iSH_SH*H2O2;
  Prx_O_O_oox: H2O2 + SOH_SOH => SOH_SO2H; Erythrocyte*two_times_ksulf*SOH_SOH*H2O2;
  Prx_O_S_oox: H2O2 + SOH_SS => SS_SO2H; Erythrocyte*ksulf*SOH_SS*H2O2;
  Prx_R_O_oox: SH_SOH + H2O2 => SH_SO2H; Erythrocyte*ksulf*SH_SOH*H2O2;
  Prx_O_O2_oox: SOH_SO2H + H2O2 => SO2H_SO2H; Erythrocyte*ksulf*SOH_SO2H*H2O2;
  iPrx_R_O_oox: H2O2 + iSH_SOH => iSH_SO2H; Erythrocyte*ksulf*iSH_SOH*H2O2;
  Prx_R_O_disulf_form: SH_SOH => SH_SS; Erythrocyte*kcond*SH_SOH;
  Prx_O_O_disulf_form: SOH_SOH => SOH_SS; Erythrocyte*two_times_kcond*SOH_SOH;
  Prx_O_S_disulf_form: SOH_SS => SS_SS; Erythrocyte*kcond*SOH_SS;
  Prx_O_O2_disulf_form: SOH_SO2H => SS_SO2H; Erythrocyte*kcond*SOH_SO2H;
  iPrx_S_O2_disulf_form: iSH_SOH => iSH_SS; Erythrocyte*kcond*iSH_SOH;
  Prx_R_S_red__Trx1SH_Trx2SH: SH_SS + Trx1SH_Trx2SH => SH_SH + Trx1SOH_Trx2SH; Erythrocyte*kred*SH_SS*Trx1SH_Trx2SH;
  Prx_R_S_red_Trx1SH_Trx2SOH: SH_SS + Trx1SH_Trx2SOH => SH_SH + Trx1SOH_Trx2SOH; Erythrocyte*kred*SH_SS*Trx1SH_Trx2SOH;
  Prx_O_S_red_Trx1SH_Trx2SH: SOH_SS + Trx1SH_Trx2SH => SH_SOH + Trx1SOH_Trx2SH; Erythrocyte*kred*SOH_SS*Trx1SH_Trx2SH;
  Prx_O_S_red_Trx1SH_Trx2SOH: Trx1SH_Trx2SOH + SOH_SS => SH_SOH + Trx1SOH_Trx2SOH; Erythrocyte*kred*SOH_SS*Trx1SH_Trx2SOH;
  Prx_S_S_red_Trx1SH_Trx2SH: SS_SS + Trx1SH_Trx2SH => SH_SS + Trx1SOH_Trx2SH; Erythrocyte*two_times_kred*SS_SS*Trx1SH_Trx2SH;
  Prx_S_S_red_Trx1SH_Trx2SOH: SS_SS + Trx1SH_Trx2SOH => SH_SS + Trx1SOH_Trx2SOH; Erythrocyte*two_times_kred*SS_SS*Trx1SH_Trx2SOH;
  Prx_S_O2_red_Trx1SH_Trx2SH: SS_SO2H + Trx1SH_Trx2SH => SH_SO2H + Trx1SOH_Trx2SH; Erythrocyte*kred*SS_SO2H*Trx1SH_Trx2SH;
  Prx_S_O2_red_Trx1SH_Trx2SOH: SS_SO2H + Trx1SH_Trx2SOH => SH_SO2H + Trx1SOH_Trx2SOH; Erythrocyte*kred*SS_SO2H*Trx1SH_Trx2SOH;
  iPrx_R_S_red_Trx1SH_Trx2SH: iSH_SS + Trx1SH_Trx2SH => Trx1SOH_Trx2SH + iSH_SH; Erythrocyte*kred*iSH_SS*Trx1SH_Trx2SH;
  iPrx_R_S_red_Trx1SH_Trx2SOH: iSH_SS + Trx1SH_Trx2SOH => iSH_SH + Trx1SOH_Trx2SOH; Erythrocyte*kred*iSH_SS*Trx1SH_Trx2SOH;
  Prx_R_O2_srx: SH_SO2H => SH_SOH; Erythrocyte*ksrx*SH_SO2H;
  Prx_O_O2_srx: SOH_SO2H => SOH_SOH; Erythrocyte*ksrx*SOH_SO2H;
  iPrx_R_O2_srx: iSH_SO2H => iSH_SOH; Erythrocyte*ksrx*iSH_SO2H;
  Prx_S_O2_srx: SS_SO2H => SOH_SS; Erythrocyte*ksrx*SS_SO2H;
  Prx_O2_O2_srx: SO2H_SO2H => SOH_SO2H; Erythrocyte*two_times_ksrx*SO2H_SO2H;
  Prx_R_R_inac: SH_SH -> iSH_SH; Erythrocyte*(kPrx2Inactiv*SH_SH - kPrx2Activ*iSH_SH);
  Prx_R_O_inac: SH_SOH -> iSH_SOH; Erythrocyte*(kPrx2Inactiv*SH_SOH - kPrx2Activ*iSH_SOH);
  Prx_R_S_inac: SH_SS -> iSH_SS; Erythrocyte*(kPrx2Inactiv*SH_SS - kPrx2Activ*iSH_SS);
  Prx_R_O2_inac: SH_SO2H -> iSH_SO2H; Erythrocyte*(kPrx2Inactiv*SH_SO2H - kPrx2Activ*iSH_SO2H);
  Prx_iR_R_inac: iSH_SH -> iSH_iSH; Erythrocyte*(kPrx2Inactiv*iSH_SH - kPrx2Activ*iSH_iSH);
  Trx_red1: Trx1SOH_Trx2SH + NADPHfree => NADPfree + Trx1SH_Trx2SH; Erythrocyte*TrxR_1(VMaxTrxR, KMNADPHTrxR, KMTrx1SOH_Trx2SH, NADPHfree, Trx1SOH_Trx2SH);
  Trx_red2: Trx1SOH_Trx2SOH + NADPHfree => NADPfree + Trx1SH_Trx2SOH; Erythrocyte*TrxR2_1(VMaxTrxR, KMNADPHTrxR, KMTrx1SOH_Trx2SOH, Trx1SOH_Trx2SOH, NADPHfree);
  Trx_R_R_Trx_O_O_swi: Trx1SH_Trx2SH + Trx1SOH_Trx2SOH => 2 Trx1SH_Trx2SOH; Erythrocyte*ktrx_div_Ktrx1*Trx1SOH_Trx2SOH*Trx1SH_Trx2SH;
  Trx_R_O_Trx_R_O_swi: 2 Trx1SH_Trx2SOH => Trx1SH_Trx2SH + Trx1SOH_Trx2SOH; Erythrocyte*two_times_ktrx*Trx1SH_Trx2SOH^2;
  Trx_O_R_Trx_R_O_swi: Trx1SOH_Trx2SH + Trx1SH_Trx2SOH => Trx1SH_Trx2SH + Trx1SOH_Trx2SOH; Erythrocyte*ktrx*Trx1SOH_Trx2SH*Trx1SH_Trx2SOH;
  Trx_R_R_Trx_R_O_swi: Trx1SH_Trx2SH + Trx1SOH_Trx2SOH => 2 Trx1SOH_Trx2SH; Erythrocyte*ktrx*Trx1SOH_Trx2SOH*Trx1SH_Trx2SH;
  Trx_O_R_Trx_O_R_swi: 2 Trx1SOH_Trx2SH => Trx1SH_Trx2SH + Trx1SOH_Trx2SOH; Erythrocyte*two_times_ktrx_div_Ktrx1*Trx1SOH_Trx2SH^2;
  Trx_O_R_swi: Trx1SOH_Trx2SH => Trx1SH_Trx2SOH; Erythrocyte*ktrx_div_Ktrx1*Trx1SOH_Trx2SOH*Trx1SOH_Trx2SH;  // modifiers: Trx1SOH_Trx2SOH
  Trx_R_O_swi: Trx1SH_Trx2SOH => Trx1SOH_Trx2SH; Erythrocyte*ktrx*Trx1SOH_Trx2SOH*Trx1SH_Trx2SOH;  // modifiers: Trx1SOH_Trx2SOH
  Trx_R_O_swi1: Trx1SH_Trx2SOH => Trx1SOH_Trx2SH; Erythrocyte*ktrx*Trx1SH_Trx2SH*Trx1SH_Trx2SOH;  // modifiers: Trx1SH_Trx2SH
  Trx_O_R_swi2: Trx1SOH_Trx2SH => Trx1SH_Trx2SOH; Erythrocyte*ktrx_div_Ktrx1*Trx1SH_Trx2SH*Trx1SOH_Trx2SH;  // modifiers: Trx1SH_Trx2SH
  Cat_1: H2O2 + Ferri => Cpd1; Erythrocyte*Cat_1_k1*Ferri*H2O2;
  Cat_2: H2O2 + Cpd1 => Ferri; Erythrocyte*Cat_2_k1*Cpd1*H2O2;
  Cat_3: Cpd1 => Cpd2; Erythrocyte*Cat_3_k1*Cpd1;
  Cat_4: Cpd2 => Ferri; Erythrocyte*Cat_4_k1*Cpd2;
  GPx1: 2 GSH + H2O2 => GSSG; Erythrocyte*GPx1_1(GPx1_f1, GPx1_f2, H2O2, GSH);
  GSR: GSSG + NADPHfree => 2 GSH + NADPfree; Erythrocyte*GSR_1(GSR_KMGSSG, GSR_KMNADPH, GSR_VMax, GSSG, NADPHfree);
  NADP_reduction: NADPfree => NADPHfree; Erythrocyte*Henri_Michaelis_Menten__irreversible__1(NADP_reduction_Km, NADP_reduction_V, NADPfree);
  NADPH_sequestration: NADPHfree -> NADPHbound; Erythrocyte*(k_NADPHsequest*NADPHfree - k__sequest*NADPHbound);
  NADP_sequestration: NADPfree -> NADPbound; Erythrocyte*(k_NADPsequest*NADPfree - k__sequest*NADPbound);
  H2O2_production: => H2O2; Erythrocyte*Constant_flux__irreversible(H2O2_production_v);
  H2O2_permeation: eH2O2 -> H2O2; eH2O2*H2O2_perm - H2O2*H2O2_perm;

  // Events:
  eH2O2pulse_start: at (5) after ((time < exH2O2_pulse_length) && (do_exH2O2_pulse == true)): fix_eH2O2 = 1, unfix_eH2O2 = 0;
  eH2O2pulse_end: at (5) after ((time > exH2O2_pulse_length) && (do_exH2O2_pulse == true)): fix_eH2O2 = 0, unfix_eH2O2 = 1, eH2O2 = 0;

  // Unit definitions:
  unit substance = 1e-6 mole;
  unit volume = litre;
  unit time = second;
  unit length = metre;
  unit area = metre^2;
end
